# OpenSim document version 40000
InverseKinematicsTool:
  results_directory: ./
  constraint_weight: Inf
  accuracy: 1e-5
  marker_file: ../../Downloads/S1T1-20200203T101357Z-001/S1T1/S1 T1 FT1.trc
  time_range: 0 24.79
  report_errors: true
  report_marker_locations: false
  IKTaskSet:
    IKMarkerTask R.Clavicle: apply=true weight=1
    IKMarkerTask C7: apply=true weight=1
    IKMarkerTask R.Shoulder: apply=true weight=1
    IKMarkerTask R.Bicep: apply=false weight=1
    IKMarkerTask R.Elbow.Lateral: apply=true weight=1
    IKMarkerTask R.Forearm: apply=false weight=1
    IKMarkerTask R.Radius: apply=true weight=1
    IKMarkerTask Handle: apply=false weight=1
    IKMarkerTask R.Elbow.Medial: apply=false weight=1
    IKMarkerTask R.Ulna: apply=true weight=1
